## Efficiency
# In this document, the efficiency of a class D amplifier will be detailed. Efficiency is an important part of all projects and it is why, it must be uderstood properly to make sure that the theory is coherent and conception good. Moreover, I chose to focus on the main loss causes on this document.
#
# In a first time we will consider the architecture below and then the real architecture of the project.
## Class D power calculation
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# Figure 1: output stage class D amplifier
# Let's start with the load power. Io and Vo are considered as the AC current and volatge below:
Io := Vo/R_L  # disabled
# and
I_RMS := Io/sqrt(2) = Vo/(sqrt(2)*R_L)  # disabled  # and
P_L := I_RMS^2*R_L = Vo^2/(2*R_L)  # disabled
# Now, we can calculate the power due to the MOSFET ON resistance and the capacitor's ESR
P_cond := I_RMS^2*(R_DSon + ESR + R_L) = Vo^2/(2*R_L^2)*(R_DSSon + ESR + R_L)  # disabled
# Finally, the power losses due to the current ripple must be calculated. We will start by calculating Δi through the inductor as defined below:
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# Figure 2: Δi current ripple
# Let's use the inductor equation to start:
V_L := L*(d/dt(i_L))  # disabled  # =>
Δi_L := V_L/L*Δt  # disabled  # with
V_L := Vin - Vo  # disabled
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# Figure 3: PWM and ripple link representation
P_ripple := I_ripple_RMS^2*(R_DSon + ESR)  # disabled
I_ripple_RMS := I_ripple_peak/sqrt(3)  # disabled
I_ripple_peak := PVDD/(2*L)*δt  # disabled
# =>
I_ripple_peak := PVDD/(2*L)*1/(4*F_PWM)  # disabled
# =>
I_ripple_peak := PVDD/(8*L*f_PWM)  # disabled
# =>
I_ripple_RMS := PVDD/(sqrt(3)*8*L*f_PWM)  # disabled
# Then we will use these equations to determine the efficiency. The global formula is the next one:
η := P_OUT/P_IN  # disabled  # or
η := Useful_power_output/Total_power_input  # disabled
# We have:
P_OUT := P_L = Vo^2/(2*R_L)  # disabled
# and
P_IN := P_cond + P_ripple = Vo^2/(2*R_L^2)*(R_DSSon + ESR + R_L) + I_ripple_RMS^2*(R_DSon + ESR)  # disabled
η := Vo^2/(2*R_L)/(Vo^2/(2*R_L^2)*(R_DSon + ESR + R_L) + I_ripple_RMS^2*(R_DSon + ESR))  # disabled
η := R_L/(R_DSon + ESR + R_L + (2*R_L^2*I_ripple_RMS)^2/Vo^2*(R_DSon + ESR))  # disabled
# This equation works only for resistive load. If the load is reactive we will have active and reactive power in the process and cos(φ) too.So, the efficiency will change and can easily be found by introducing cos(φ) in Pload and Pcond:
P_cond := Vo^2/(2*|Z_L|^2)*(R_DSSon + ESR + |Z_L|*cos(φ))  # disabled  # and
P_L := Vo^2/(2*|Z_L|)*cos(φ)  # disabled
# Indeed, with load reactive impedance, all load terms must be multiplied by cos(φ). Efficiency is now:
η := |Z_L|*cos(φ)/(R_DSon + ESR + |Z_L|*cos(φ) + 2*|Z_L|^2*I_ripple_RMS^2/Vo^2*(R_DSon + ESR))  # disabled
# It could interesting now, to add the switching losses. The formula of switching losses is the next one:
P_SW := 1/2*PVDD*Io*(t_c.on + t_c.off)*F_SW  # disabled  # For the rest, we will set:
(t_c.on + t_c.off)*F_SW = T  # disabled
P_IN := P_cond + P_ripple + P_SW  # disabled
# =>
P_IN := Vo^2/(2*R_L)*(R_DSSon + ESR + R_L) + I_ripple_RMS^2*(R_DSon + ESR) + 1/2*PVDD*Io*T  # disabled
# and so:
η := |Z_L|*cos(φ)/(R_DSon + ESR + |Z_L|*cos(φ) + 2*|Z_L|^2*I_ripple_RMS^2/Vo^2*(R_DSon + ESR) + PVDD*Io*|Z_L|^2/Vo^2*T)  # disabled
# with
Io*|Z_L|^2/Vo^2 = |Z_L|/Vo  # disabled
η := |Z_L|*cos(φ)/(R_DSon + ESR + |Z_L|*cos(φ) + 2*|Z_L|^2*I_ripple_RMS^2/Vo^2*(R_DSon + ESR) + PVDD*|Z_L|/Vo*T)  # disabled
# To be sure that the switching losses are negligible we will plot the efficiency and compare with and without. Below are the parameters I chose by looking at some datasheets and documents:
f_SW := 380*10^3*Hz
PVDD := 8 V
R_DSon := 0.03 Ω
ESR := 0.25 Ω
L := 100*10^-6*H
t_c.on := 2.2*10^-9*s
t_c.off := 9.7*10^-9*s
Vo := 7 V
T := (t_c.off + t_c.on)*f_SW = 0.004522
I_ripple_RMS := PVDD/(sqrt(3)*4*L*f_SW) = 0.0303869 A
# Efficiency without switching losses:
η(Z_L, φ) := |Z_L|*cos(φ*π/180)/(R_DSon + ESR + |Z_L|*cos(φ*π/180) + 2*|Z_L|^2*I_ripple_RMS^2/Vo^2*(R_DSon + ESR))
# [component: inputs η]
# Efficiency with switching losses:
η_sw(Z_L, φ) := |Z_L|*cos(φ*π/180)/(R_DSon + ESR + |Z_L|*cos(φ*π/180) + 2*|Z_L|^2*I_ripple_RMS^2/Vo^2*(R_DSon + ESR) + PVDD*|Z_L|/Vo*T)
# [component: inputs η_sw]
P_ripple := I_ripple_RMS^2*(R_DSon + ESR) = 0.000258541 W
# As we can see the results are very similar, which means that switching losses are negligible. Below are the results at a point near to the maximum efficiency:
P_cond(Z_L, φ) := Vo^2/(2*|Z_L|^2)*(R_DSon + ESR + |Z_L|*cos(φ*π/180))
η(700 Ω, 78) = 0.963899
η_sw(700 Ω, 78) = 0.941345
# However, if we increase the switching frequency at 5Hz, which is something existing for other application like DC/DC converter, for example. Advantages of using higher frequencies include reduced component's sizes, faster transient load response time, and lower output ripple. However, higher frequencies have reduced efficiencies, increased power losses, RF noise and EMI. I got the following results:
P_cond(700 Ω, 78) = 0.00729091 W
Z_L := 700 Ω
φ := 78 °
P_L := Vo^2/|Z_L|*cos(φ) = 0.0145538 W
f_SW := 5*10^6*Hz
I_ripple_RMS := PVDD/(sqrt(3)*8*L*f_SW) = 0.0011547 A
T := (t_c.off + t_c.on)*f_SW = 0.0595
Zeq := |1 + RCs|/|Cs|  # disabled
P_cond := Vo^2/|Z_L|^2*(R_DSon + ESR + |Z_L|*cos(φ)) = 0.0145818 W
Zeq_norm := sqrt(1 + (20*0.11*10^-6*1*10^3*2*π)^2)/(0.11*10^-6*1*10^3*2*π) = 1447
η(Z_L, φ) := |Z_L|*cos(φ*π/180)/(R_DSon + ESR + |Z_L|*cos(φ*π/180) + 2*|Z_L|^2*I_ripple_RMS^2/Vo^2*(R_DSon + ESR))
I1 := 7/1447 = 0.0048376
η(700 Ω, 78) = 0.998029
P_cond := Vo^2/|Z_L|^2*(R_DSon + ESR) = 2.8e-5 W
η_sw(Z_L, φ) := |Z_L|*cos(φ*π/180)/(R_DSon + ESR + |Z_L|*cos(φ*π/180) + 2*|Z_L|^2*I_ripple_RMS^2/Vo^2*(R_DSon + ESR) + PVDD*|Z_L|/Vo*T)
P_driver := 380*10^3*100*10^-12*14^2*W + 14*250*10^-6*W + 610*10^-6*1*14*W = 0.019488 W
Rend := P_L/(P_cond + P_ripple) = 50.7914
η_sw(700 Ω, 78) = 0.752424
# Here the results are pretty different! The efficiency is 17% lower considering the switching losses.
#
# We can conclude that for our case, with a frequency around the kHz, the switching losses will have almost no influences on the efficiency and so can be neglected.
## Real architecture efficiency
# This part aims to give a theoretical efficiency of the whole circuit including the other parts (snubber, tracks losses, damping circuits... etc.).
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# Above is the schematic of the new ACS function. Earlier, we gave equation related to the MOSFETs losses. Now we will add the losses of the entire circuit and due to ESR, resistors, gate drivers... .
#
# Firstly we will fixe a load value. Here we chose Rload=36.38 and Lload=5.45m which correspond to a current of 40mA through the load and a sinus frequency equal to 5kHz.
#
# Then we will come back to the efficiency equation below:
η := P_OUT/P_IN  # disabled  # or
η := Useful_power_output/Total_power_input  # disabled
# Pout here is the power in the Load, and it is equal to:
R_L := 36.38 Ω
I_RMS := 40 mA
Z_L := 175 Ω
φ := 78 °
P_L := R_L*I_RMS^2 = 0.058208 W  # or
P_L := Vo^2/|Z_L|*cos(φ) = 0.0582153 W  # and PL = Pout
# Concerning the 3.3kΩ resistors, all have the same voltage across, 3.5V RMS. So we have:
P := 3.5^2*V^2/(3.3*10^3*Ω) = 0.00371212 W  # and for the 3 resistors:
P_3.3k := 3*P = 0.0111364 W
# The method for the 10Ω resistor is pretty similar but it include the inductor impedance.
C_2 := 0.11*10^-6*F
f := 5*10^3*Hz
w := 2*π*f = 31415.9 1/s
R_2 := 10 Ω
Z_eq := (1 + R_2*C_2*w*j)/(C_2*w*j)  # disabled
Z_eq.norm := sqrt(1 + (R_2*C_2*w)^2)/(C_2*w) = 289.545 Ω
# So, we can approximate the current. Indeed, the supply voltage here is 8V, we can assume that it is approximately the maximum amplitude of the sinus and consequently deduced the RMS value:
V_sin.RMS := 8 V/sqrt(2) = 5.65685 V  # then
I_RMS := V_sin.RMS/Z_eq.norm = 0.019537 A
# And
P := R_2*I_RMS^2 = 0.00381695 W
# that's the power disspated by one of the 10Ω snubber resistor
# So as there are 2 snubbers, the total power disspated is:
P_snubber := 2*P = 0.00763391 W
# The last rectangle on the left of the figure represent the power disspated by the inductor's ESR. Indeed, the current in the inductor is the strongest of the circuit as the inductors are directly in series with the half bridge amplifier stage.
# The first thing to do is to find the current through the inductors. This current is in a huge part due to the capacitors of the LC filters. To be a bit more precise, the current consume by the load is 40mA in this case as we fixed the load values corresponding, but of course, more current will be asked to the power supply to make all the parts of the project work.
#
# We also know that capacitors will pull current to follow the wanted voltage shape. In our case we decided to fixed the sinus frequency to 5kHz, which is the maximum sinus frequency in my specification. In this case, the capacitors linked to the ground in the LC filters, will require more current than if the frequency was smaller. That is logical regarding the capacitor equation we will use now:
i := C*d/dt(u)  # error: Cette variable est indéfinie.  # If the frequency increase, dt will decrease and i increase too.
# A.N.:
C := 1*10^-6*F
Δu := 8 V  # as it is the sinus maximum amplitude at this part of the circuit
Δt := 1/(2*5*10^3*Hz) = 0.0001 s
# We just have to add the other currents calculated earlier to find the current through the inductors
I := C*Δu/Δt = 0.08 A
I_c4 := I
I_R4 := 3.5 V/(3.3*10^3*Ω) = 0.00106061 A
I_R3 := I_R4
I_R1 := I_RMS
I_Load := 40*10^-3*A
I_inductors := I_c4 + I_R1 + I_R4 + I_R3 + I_Load = 0.141658 A
# That is the current for the two inductors, so for one:
I_inductor := I_inductors/2 = 0.0708291 A
# In addtition, the ESR of the inductor is:
ESR := 0.25 Ω
# Finally:
P_inductor := ESR*I_inductor^2 = 0.00125419 W
# At this point we can add the losses due to the mosfets. Below are the differents types of losses:
R_DSon := 0.04 Ω
I_mosfet := 0.1 A
Vo := 7 V
P_cond := I_mosfet^2*R_DSon = 0.0004 W
f_SW := 380*10^3*Hz
L := 100*10^-6*H
I_ripple_RMS := Vo/(sqrt(3)*4*L*f_SW) = 0.0265885 A
P_ripple := I_ripple_RMS^2*(R_DSon + ESR) = 0.000205015 W
t_c.on := 2.2*10^-9*s
t_c.off := 9.7*10^-9*s
f_SW := 380*10^3*Hz
P_SW := 1/2*Vo*I_Load*(t_c.on + t_c.off)*f_SW = 0.00063308 W
Pmosfets := 4*(P_SW + P_cond) + 2*P_ripple = 0.00454235 W
P_driver := f_SW*500*10^-12*F*8^2*V^2 = 0.01216 W
# At the end we can calculate the efficiency of the global circuit in this case:
η := P_L/(Pmosfets + P_snubber + P_inductor + P_3.3k + P_L + P_driver) = 0.613166
# All the result above are really similar to the results given by LTspice, except the mosfet losses where there are some mW of difference.
