## Filtering
## Output filter
# Firstly, the output filter aims to extract the sinus from the SPWM signal but also to minimize the output ripple and remove the DC mode.
# To reach all those goals we will design a band pass filter. Indeed, that type of filter allows to cut the DC mode but also the high frequencies which generates noise and ripple.
#
# The first output filter version is the next one:
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# I identified three different parts, that will be developed below:
#
# LPF
# This part is a LC low pass filter that cut at aound 27kHz
#
# So the two inpt signals will be filtered at 16KHz
#
# 2. This circuit is called a snubber and aims to attenuate the gain peak due to the inductor. To size it, i inspired mysefl from a document which give the folowing information. Then, i verified if the peak was correctly attenuate, and it is OK.
#
# here Lp=100uH and Cp=1uF, so:
#
# 3.  The next part is composed of two capacitors, resistors The idea is to do CR a hight pass filter. This one cut between 460Hz and 1400Hz depending on the load.
#
# The 3.3kΩ resistors are here to take back the ground as a reference that will consequently erase the DC component.
#
# Then, we can identified simply a RLC series circuit or (CRL here). Below is the transfer function of this circuit:
C_1 := 1 μF
C_4 := 1 μF
L1 := 100 μH
L2 := 100 μH
R1 := 10 Ω
f_o := 1/(2*π*sqrt(L1*C_1)) = 15915.5 1/s
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R_snub := sqrt(100*10^-6*H/(1*10^-6*F)) = 10 Ω
C_snub := 1/(2*π*R_snub*f_o) = 1e-6 F
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# We have:
Vo/Vi*s := (R + Ls)/(1/Cs + R + Ls)  # disabled
Vo/Vi*s := (RCs + LCs^2)/(1 + RCs + LCs^2)  # disabled
Vo/Vi*jw := (RCjw - LCw^2)/(1 + RCjw - LCw^2)  # disabled
# It looks like a high pass filter equation with the natural frequency:
ω_o := 1/sqrt(LC)  # disabled
# We will see later that for a load current between 10mA and 40mA, we have respectively L=5mH min and L=60mH max. Capacitors values are fixed and equal to 1.5uF but Ceq is the capacitance equivalent to the 2 capacitor in series, so 0.75uF.
# for L=5mH:
ω_o := 1/sqrt(5*10^-3*H*0.75*10^-6*F) = 16329.9 1/s
f_o := ω_o/(2*π) = 2598.99 1/s
# for L=60mH:
ω_o := 1/sqrt(60*10^-3*H*0.75*10^-6*F) = 4714.05 1/s
f_o := ω_o/(2*π) = 750.264 1/s
# Ok, before to simulate it with Ltspice, let's find the transfert function of the entire filter and plot the bode diagram wit Matlab.
#
# Firstly, we will find the transfert function with an impedance representation. Below is a simplified represenation of the filter.
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# Then we will use Zeq2 instead of Zload:
Z_eq2 := Z_Load*2*Z_5/(Z_Load + 2*Z_5)  # disabled
# so
I_Load := Vo/Z_eq2  # disabled
# We want:
Vo/Vi = T  # disabled
Vo := I_Load*Z_eq2  # disabled
Vi := 2*Z_1*I + 2*Z_2*I_Load + I_Load*Z_eq2  # disabled
# with
I := I_1 + I_Load  # disabled
Vi := 2*Z_1*(I_1 + I_Load) + 2*Z_2*I_Load + I_Load*Z_eq2  # disabled
# The currents must be express in function of Vo in order to find the transfert function
I_1 := V_int/(2*Z_eq1)  # disabled
# The following voltage divider allows us to express Vint in function of Vo:
Vo := Z_eq2/(Z_eq2 + 2*Z_2)*V_int  # disabled
V_int := (Z_eq2 + 2*Z_2)/Z_eq2*Vo  # disabled
# So:
I_1 := (Z_eq2 + 2*Z_2)/(2*Z_eq1*Z_eq2)*Vo  # disabled
# Finally:
Vi := 2*Z_1*((Z_eq2 + 2*Z_2)/(2*Z_eq1*Z_eq2)*Vo + Vo/Z_eq2) + 2*Z_2*Vo/Z_eq2 + Vo  # disabled
# We can divide by Vo:
Vi/Vo := 2*Z_1*((Z_eq2 + 2*Z_2)/(2*Z_eq1*Z_eq2) + 1/Z_eq2) + 2*Z_2/Z_eq2 + 1 = G  # disabled
T := 1/G
# Numerical application:
L_load := 5.45*10^-3
L1 := 100*10^-6
C1 := 1*10^-6
R2 := 3.3*10^3
C3 := 1.5*10^-6
R1 := 10
C2 := 0.22*10^-6
R_load := 36.38
Z_snub(s) := R1 + 1/(C2*s)
Z3(s) := 1/(C1*s)
Z_eq1(s) := Z3(s)*Z_snub(s)/(Z3(s) + Z_snub(s))
Z_1(s) := L1*s
Z_2(s) := 1/(C3*s)
Z_Load(s) := R_load + L_load*s
Z_eq2(s) := Z_Load(s)*2*R2/(Z_Load(s) + 2*R2)
T(s) := 1/(2*Z_1(s)*((Z_eq2(s) + 2*Z_2(s))/(2*Z_eq1(s)*Z_eq2(s)) + 1/Z_eq2(s)) + 2*Z_2(s)/Z_eq2(s) + 1) simplify; expand → (10*10^9*s^3 - 0*s^4 + 4.612*10^15*s^2 + 30.342*10^18*s + 30.518*10^-6)/(s^5 + 561.726*10^3*s^4 + 14.566*10^9*s^3 + 4.918*10^15*s^2 + 33.72*10^18*s + 1.118*10^24)
# I put this transfer function in Matlab and plot the bode diagram which give that:
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# The bode diagram given by the simulation on LTspice is the following:
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# The bode diagrams are the same which means that the theory and simulation are coherent.
# Later, i decided to add a choke inductor to the circuit and so i have this circuit now:
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# After some simulation, I found out that this change do not have a huge impact on the precedent filtering shape. Indeed, the choke in combination include a zero and a pole out of the actual filtering shape, which will increase attenuation in very low and high frequencies. It is visible on the figure below, with the new circuit in green and previous in red:
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## Load range values
# Firstly, the circuit had to drive current from 10mA to 40mA. Secondly, the load had an inductive caracter and consequently will introduce reactive power and consequently a new parameter, cos(φ). The xVDT sensor that the ACS circuit needs to drive have a φ equal to 78° approximately.
#
# Futhermore we know the two equations following:
#
# with R and L the load resistance and capacitance.
# and
arg(Z_load(s)) := atan(Lω/R) = φ  # disabled
|Z_load(s)| := sqrt(R^2 + Lω^2)  # disabled
# The xVDT sensor need to be excited by a sinusoid of 7V RMS. So we can calculate a range of impedance from the current range we have:
#
# for 10mA :  for 40mA :
Z_load.max := 7 V/(10*10^-3*A) = 700 Ω
Z_load.max := 7 V/(40*10^-3*A) = 175 Ω
# Now let's find the R and L value with the data we have.
# Before all, we can express L in function of R:
Lω/R := tan(78 °)  # disabled  # =>
L := tan(78 °)*R/ω  # disabled
atan(Lω/R) := φ = 78 °  # disabled  # =>
# for 10mA:
|Z_load| = 700  # disabled  # =>
sqrt(R^2 + Lω^2) = 700  # disabled
# => | Now we replace L
# =>
R^2 + Lω^2 := 700^2  # disabled
# =>
R^2 + tan(78)^2*R^2 := 700^2  # disabled
# =>
R := sqrt(700^2/(1 + tan(78 °)^2)) = 145.538
# Then, we can find L for the frequency we need. For us the range frequency go from 1.9kHz to 5kHz
f_1.9kHz := 1.9*10^3*Hz
L_1.9kHz := tan(78 °)*(145.54 Ω/(2*π*f_1.9kHz)) = 0.0573554 H
f_5kHz := 5*10^3*Hz
L_5kHz := tan(78 °)*(145.54 Ω/(2*π*f_5kHz)) = 0.0217951 H
# for 40mA:
|Z_load| = 175  # disabled  # =>
R := sqrt(175^2/(1 + tan(78 °)^2)) = 36.3845
# Again:
f_1.9kHz := 1.9*10^3*Hz
L_1.9kHz := tan(78 °)*(36.385 Ω/(2*π*f_1.9kHz)) = 0.0143389 H
f_5kHz := 5*10^3*Hz
L_5kHz := tan(78 °)*(36.385 Ω/(2*π*f_5kHz)) = 0.00544876 H
# If we want to go further we do the same with 1mA to make to test the values we find and make sure the filter still work with those values
# for 1mA:
Z_load.max := 7 V/(1*10^-3*A) = 7000 Ω
|Z_load| = 7 kΩ  # disabled  # =>
R := sqrt(7000^2/(1 + tan(78 °)^2)) = 1455.38
# Again:
f_1.9kHz := 1.9*10^3*Hz
L_1.9kHz := tan(78 °)*(1455 Ω/(2*π*f_1.9kHz)) = 0.573396 H
f_5kHz := 5*10^3*Hz
L_5kHz := tan(78 °)*(1455 Ω/(2*π*f_5kHz)) = 0.217891 H
