# Definition for Bode plots:
sf(f) := 2j*π*f
L := 40 mH
start := 1 Hz
end := 5000 kHz
nmpts := 5000
θ(Fn) := arg(Fn)*180/π
C_5 := 1 μF
fr :=
    for N ∈ 1 .. nmpts + 1
        fr[N] ← 10^(log(start/Hz) + (N - 1)/nmpts*(log(end/Hz) - log(start/Hz)))*Hz
dB(Fn) := 20*log(|Fn|)
R := 100 Ω
bode(TF, s) :=
    mag ← 20*vectorize(log(vectorize(|TF(s)|)))
    phz ← vectorize(arg(vectorize(TF(s))))*180/π
    jmp ← 1
    for n ∈ 1 .. last(s) - 1
        diff ← phz[n + 1] - phz[n]
        if (diff > 180) + (diff < -180)
            pos[jmp] ← n + 1
            sh[jmp] ←
                -360 if diff > 0
                360 otherwise
            jmp ← jmp + 1
    if jmp > 1
        for x ∈ 1 .. jmp - 1
            for z ∈ pos[x] .. last(s)
                phz[z] ← phz[z] + sh[x]
    [mag; phz]
sn := sf(fr)
T(x) := sqrt((L*C_5*x^2)^2 + (R*C_5*x)^2)/sqrt((2 - L*C_5*x^2)^2 + (R*C_5*x)^2)
T_1(s) := 1/(2 + R*C_5*s + L*C_5*s^2)
T_2(s) := (R*C_5*s + L*C_5*s^2)/(2 + R*C_5*s + L*C_5*s^2)
[Gea1_mag; Gea1_phs] := bode(T_1, sn)
