# Worksheet setting: ORIGIN = 1
## ACS in CLASS D
# This document describes the characteristics of the damped filters used in the KIT FM
## Modification description
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## Input document
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## Convention
# This document provides the characteristics of the output voltage in 5 conditions, in matrix form.
resultat := [Temp_max; 25 °C*max; nominal_25°C; 25 °C*min; Temp_min]*□  # disabled
||(Z1, Z2) := Z1*Z2/(Z1 + Z2)
# Definition for Bode plots:
sf(f) := 2j*π*f
θ(Fn) := arg(Fn)*180/π
dB(Fn) := 20*log(|Fn|)
bode(TF, s) :=
    mag ← 20*vectorize(log(vectorize(|TF(s)|)))
    phz ← vectorize(arg(vectorize(TF(s))))*180/π
    jmp ← 1
    for n ∈ 1 .. last(s) - 1
        diff ← phz[n + 1] - phz[n]
        if (diff > 180) + (diff < -180)
            pos[jmp] ← n + 1
            sh[jmp] ←
                -360 if diff > 0
                360 otherwise
            jmp ← jmp + 1
    if jmp > 1
        for x ∈ 1 .. jmp - 1
            for z ∈ pos[x] .. last(s)
                phz[z] ← phz[z] + sh[x]
    [mag; phz]
# Amplifier Gain calculation
start := 1 Hz
end := 5000 kHz
nmpts := 5000
fr :=
    for N ∈ 1 .. nmpts + 1
        fr[N] ← 10^(log(start/Hz) + (N - 1)/nmpts*(log(end/Hz) - log(start/Hz)))*Hz
sf(f) := 2j*π*f
sn := sf(fr)
## State of art
# On the SEC-E:
# The ACS is provided with an AOP LT1970 , powered in +15 / 0V / -15V.
# It generates ACS voltage 10V peak /70ma RMS, in single ended
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# SECE schematic extraction
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# LT1970 datasheet extraction
# The static consumption on SEC-E (per ACS function) is
P_Static_nominal_SEC_E := 2*7*mA*15*V = 0.21 W
P_Static_max_SEC_E := 2*13*mA*15*V = 0.39 W
# The current which have to be provided is
i_ACS := 70 mA  # (RMS current)
# As long as the voltage source is an aop, is is like a LDO generator.
# On the positive alternance:
P_pos := 15 V*i_ACS
# On the negative alternance:
P_neg := 15 V*i_ACS
# The Power consumned by the function (with 70mA of current output) is
P_total_dynamic_secE := P_pos/2 + P_neg/2
P_total_dynamic_secE = 1.05 W
# On ELAC -E
# The function is dissimilar to SEC-E design. The ACS generation is differential, the design is the same to provide the High side and the low side of the signal.
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# The function uses 2AOPs (1 per side)
# the static current is weak
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P_static_AOP := 2*1*mA*26*V  # (2 AOP per ACS powered in +13 / -13V ==> 26V differential)
# The polarisation of Q116 / Q119 consumn also a weak current:
i_pol_Q116 := (13 V - 0.7 V)/(3320 Ω) = 3.70482 mA
# The ACS function is built with 4 identical functions
P_static_prot := 4*i_pol_Q116*13*V
P_static_total_nominal_elac_E := P_static_prot + P_static_AOP
P_static_total_nominal_elac_E = 0.244651 W
# The dynamic power dissipated by the function is
P_dyn_ELAC_E(i_ACS) := 26 V*i_ACS
P_dyn_ELAC_E(70 mA) = 1.82 W
# Note that the studies done for ELAC / SEC does no imply current consumned by the DAC
## ACS in Class D Principle
# The input signal of the function is provided by a DAC. It cound be independant or provided by a microcontroler. In the figure, it is provided by a STM32 microcontroleur. DC blockers capacitors are placed between the CLASS D cots and the DAC (as request by the COTS datasheet).
# Note that the principle can evolve and use a Class D Cots with numeric input (I2S format)
# The Cotsd provide two PWM signal wich have to be filtered.
# To be a differencial signal without common mode, a the filter associated to the COTS output has to remove the DC part. This filter is as important as the CLASS D COTS
## Filter definition
L1 := 33 μH
R1 := 1 Ω
C2 := 47 nF
R3 := 2.8 Ω
C3 := 1000 nF
L4 := 10 μH
R4 := R1
C5 := 47 nF
C6 := 1000 nF
R6 := 2.8 Ω
C7 := 100 μF
Lload := 0.100 mH
Rload := 80 Ω
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10/9 = 1.11111
0.7/229 = 0.00305677
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(1)
# And Z1(s) the impedance built with C1a, R1a and L1 (+R1 = its impedancy)
Z1(s) := L1*s + R1
# We call Z1: the impedance of C2
Z2(s) := 1/(C2*s)
# We wall Z3 the impedance of C3+R3
Z3(s) := 1/(C3*s) + R3
# We call Req23(s) the impedance eqivalent to Z2 // Z3
Req23(s) := Z2(s)*Z3(s)/(Z2(s) + Z3(s))
Z1(1i*2*π*1953*Hz) = (1 + 0.404945i) Ω
# We call Z4 the impedance of the inductor L4
Z4(s) := L4*s + R4
# We call Z5: the impedance of C5
Z5(s) := 1/(C5*s)
# We wall Z6 the impedance of C6+R6
Z6(s) := 1/(C6*s) + R6
# We call Req56(s) the impedance eqivalent to Z5 // Z6
Req56(s) := Z5(s)*Z6(s)/(Z5(s) + Z6(s))
Z7(s) := 1/(C7*s)
# And we call Zload the impedance of the load (LVDT):
Z_Load(s) := Rload + Lload*s
# The equations of the filter are:
Req56(1i*2*π*1953*Hz) = (2.55425 - 77.8383i) Ω
Vout := Z_load*i_load  # disabled
(1)
Vin := 2*Z1(i_Load + i_perte1 + i_perte2) + 2*Z4(i_Load + i_perte2) + 2*Z7(i_Load) + Z_Load*i_Load  # (2)
Vout := Vint2*Z_Load/(Zload + 2*Z7)
Vint2 := Vout*((ZLoad + 2*Z7)/Z_Load)
i_perte2 := Vint2/(2*Zeq56)
i_perte2 := Vout*((ZLoad + 2*Z7)/Z_Load)/(2*Zeq56)
i_perte2 := Vout*((ZLoad + 2*Z7)/(Z_Load*(2*Zeq56)))
i_load := Vout/Z_Load
Vint1 := Vint2 + 2*Z4(i_perte2 + i_load)
Vint1 := Vout*((ZLoad + 2*Z7)/Z_Load) + 2*Z4*(Vout*((ZLoad + 2*Z7)/(Z_Load*(2*Zeq56))) + Vout/Z_Load)
i_perte1 := Vint1/(2*Zeq23)
i_perte1 := Vout((ZLoad + 2*Z7)/Z_Load + 2*Z4((ZLoad + 2*Z7)/(Z_Load*(2*Zeq56)) + 1/Z_Load))/(2*Zeq23)
Z_load(1i*2*π*1953*Hz) =  # error: Cette variable est indéfinie.
# Rappel:
Vin := 2*Z1(i_Load + i_perte1 + i_perte2) + 2*Z4(i_Load + i_perte2) + 2*Z7(i_Load) + Z_Load*i_Load
# Donc
G(s) := Vin(s)/Vout(s)
Req56(1i*2*π*1953*Hz) = (2.55425 - 77.8383i) Ω
G(s) := 2*Z1(s)*(1/Z_Load(s) + ((Z_Load(s) + 2*Z7(s))/Z_Load(s) + 2*Z4(s)*((Z_Load(s) + 2*Z7(s))/(Z_Load(s)*(2*Req56(s))) + 1/Z_Load(s)))/(2*Req23(s)) + (Z_Load(s) + 2*Z7(s))/(Z_Load(s)*(2*Req56(s)))) + 2*Z4(s)*(1/Z_Load(s) + (Z_Load(s) + 2*Z7(s))/(Z_Load(s)*(2*Req56(s)))) + (2*Z7(s) + Z_Load(s))/Z_Load(s)
F_t(s) := 1/G(s)
# To plot the function, we define the Gain and the phasis:
[Gea1_mag; Gea1_phs] := bode(F_t, sn)
.
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10 V/|Z_Load(1i*2*π*1953*Hz)| = 0.124985 A
|Z_Load(1i*2*π*1953*Hz)| = 80.0094 Ω
|F_t(1i*2*π*1953*Hz)| = 0.961423
# Class D filter response
# The Class D component is design to work at a frequency, which is 250kHz min. The output of the component is a PWM signal, with an amplitude = 11.5V min. For the following compute, we considere that:
V_power := 12 V
# The expected amplitude of the ripple (due to the pwm) is
V_ripple := |F_t(1i*2*π*2050*kHz)|*V_power = 0.443564 mV
## Filter attenuation
# The aim of this chapter is to determine the amplitude of the COTS output
# We define the load with its R and L value as a parameter
Z_load(s, Rload, Lload) := Rload + Lload*s
# This leads to write its transfert function as follow
F_t(s, Rload, Lload) := Z_load(s, Rload, Lload)/(2*Z1(s) + Z1(s)*Z_load(s, Rload, Lload)/Req(s) + Z_load(s, Rload, Lload))
# With 80Ω and 100mH
Rl := 80 Ω
Ll := 100 mH
# To have 10V in output of the filter, the sinus at the output of the Class D COTS has to be
Amp := 10 V/|F_t(1i*2*π*1953*Hz, Rl, Ll)|
i_max := 10 V/|Z_load(1i*2*π*1953*Hz, Rl, Ll)| = 8.13199 mA
Qt(s) := F_t(s, Rl, Ll)
[Gea1_mag; Gea1_phs] := bode(Qt, sn)
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# With 15Ω and 6mH
Rl := 15 Ω
Ll := 6 mH
# To have 10V in output of the filter, the sinus at the output of the Class D COTS has to be
Amp := 10 V/|F_t(1i*2*π*1953*Hz, Rl, Ll)|
i_max := 10 V/|Z_load(1i*2*π*1953*Hz, Rl, Ll)| = 0.133087 A
Qt(s) := F_t(s, Rl, Ll)
[Gea1_mag; Gea1_phs] := bode(Qt, sn)
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# With 100Ω and 0.6μH
Rl := 100 Ω
Ll := 0.6 μH
# To have 10V in output of the filter, the sinus at the output of the Class D COTS has to be
Amp := 10 V/|F_t(1i*2*π*1953*Hz, Rl, Ll)|
i_max := 10 V/|Z_load(1i*2*π*1953*Hz, Rl, Ll)| = 0.1 A
Qt(s) := F_t(s, Rl, Ll)
[Gea1_mag; Gea1_phs] := bode(Qt, sn)
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1/(1/38 + 1/13) = 9.68627
# With 60Ω and 0.6μH
Rl := 60 Ω
Ll := 0.6 μH
# To have 10V in output of the filter, the sinus at the output of the Class D COTS has to be
Amp := 10 V/|F_t(1i*2*π*1953*Hz, Rl, Ll)|
i_max := 10 V/|Z_load(1i*2*π*1953*Hz, Rl, Ll)| = 0.166667 A
Qt(s) := F_t(s, Rl, Ll)
[Gea1_mag; Gea1_phs] := bode(Qt, sn)
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# Without load
Rl := 60 kΩ
Ll := 0.006 μH
# To have 10V in output of the filter, the sinus at the output of the Class D COTS has to be
Amp := 10 V/|F_t(1i*2*π*1953*Hz, Rl, Ll)|
i_max := 10 V/|Z_load(1i*2*π*1953*Hz, Rl, Ll)| = 0.000166667 A
Qt(s) := F_t(s, Rl, Ll)
[Gea1_mag; Gea1_phs] := bode(Qt, sn)
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## Protection of the circuit
# the signal which goes output the product must generally be protected against short circuit and inadvertant application of 28Vdc.
# In this design, the output of the compoent have serial capacitor, to eliminate DC part of the signal (and make it differential). as a consequence, this design is immune to 28V application. It is also immune to 0V short circuit application (TBC)
# The function has also to be protected against application of 115V/400Hz. R1 / R1a/C1a filter does not protect the circuit: the function does not support application of 115VAC.
180 V/|ZeqC1(1i*2*π*400*Hz)| =  # error
# The application of a 115V 400Hz should be destructive for the product.
## Efficiency of the design
# As long as the load is mainly capacitive, the cos φ parameter is near of 90°. Furtermore, the static consumption of the design is not nul. As a consequence, watever the case, the expected efficiency is expected to be weak be weak.
# The efficiency has to be compared with an existant solution. The SEC-E solution is better (in effeciciency) than the ELAC-E solution. However, it is not differencial ans does not support short circuit to 28V.
# The consumption os the COTS is divided in two parts:
# One on the analog part (what is generally called AVDD)
# One on the power part (what is generally called PVDD)
# We use here the TPA3112d2 COTS
# AVDD and PVDD are specified with the case AVDD=PVDD. But  AVDD may not be the same value as PVDD.
# To minimize the consumption, We fixe
AVDD := 10 V
# The consumption is constant, whatever is the load.
i_AVDD := 9.2 mA
# The PVDD is not constant, and depends of the output load. however, the consumption with no load is
PVDD := 14 V
i_PVDD_static := 13.4 mA
# To ensure that the component works in all conditions, the PVDD is fixed to 14V.
## Efficiency : Tests in labs
# The static consumption of the COTS for 2 DACs is
P_static_cots_2DACs := PVDD*i_PVDD_static + AVDD*i_AVDD
# The static consumption of the COTS for 1 DAC is:
P_static_COTS_1DAC := P_static_cots_2DACs/2
# To determine the efficiency of the COTS we use
# The amplitude of the sinus VSIN
# the current provided in the load iout
# the parameters of the load (Rload and Lload)
# the frequency in the sinus
# The current consumned in PVDD
# The power dissipated is
P_d(i_PVDD) := PVDD*(i_PVDD - i_PVDD_static) + P_static_COTS_1DAC  # disabled
# The real consumption of the load is
P_load(VSIN, freq, current, Rload, Lload) := VSIN*current*cos(arg(1i*Lload*2*π*freq + Rload))
# the efficiency is
ν_COTS(VSIN, freq, current, Rload, Lload, i_PVDD) := 100*VSIN*current*cos(arg(1i*Lload*2*π*freq + Rload))/(PVDD*(i_PVDD - i_PVDD_static) + P_static_COTS_1DAC)
# For a single point (162mA generated):
ν_COTS(7.9 V, 1900 Hz, 162 mA, 15 Ω, 6 mH, 58.6 mA) = 33.9527
# The equivalent for SEC-E is
ν_SEC_E(VSIN, freq, current, Rload, Lload, i_PVDD) := 100*VSIN*current*cos(arg(1i*Lload*2*π*freq + Rload))/(P_Static_nominal_SEC_E + current*15*V)
ν_SEC_E(7.9 V, 1900 Hz, 162 mA, 15 Ω, 6 mH, 58.6 mA) = 9.9363
# Note that the efficiency of the COTS should be always greater than thed SEC-E , as long as the static consumption if better in the case of the COTS.
## Theorical approch
# According to doc [1], the RMS ripple current in the self is:
i_ripple := PVDD/(sqrt(3)*(8*f_s*inductor))  # disabled  # (1)
13 V/(sqrt(3)*(8*310*kHz*47*μH)) = 0.0643922 A
# Je devrais avoir 58mA (simu... et c'est independant de la capa)
# The power loss due to the power inductor is:
P_rip := (R_inductor + R_ds_on)*i_ripple^2  # disabled  # (2)
# Note that there is 2 inductors in the design, the loss counts twice
i_load.rms := 10 V/(|100 Ω + 1i*40*mH*2*kHz|*sqrt(2)) = 0.0552158 A
# The current on the load is
|100 Ω + 1i*40*mH*2*kHz| = 128.062 Ω
i_load.rms := V_output_pic/(|Z_load|*sqrt(2))  # disabled  # (3)
(13 V/(2*47*μH))*1/(2*310*kHz) = 223.061 mA  # doc Jeroen Goudswaard
# The power dissipated on the load, the resistance of the inductor and the rdson is
# (4) | LA valeur RMS d'un signal triangulaire est Imax/ racine3
P_resistive_part := (2*R_ds_on + 2*R_inductor + Z_load*cos(φ))*(V_output_pic/(|Z_load|*sqrt(2)))^2  # disabled
223/(2*sqrt(3)) = 64.3746
# The usefull power is given on the format
Power := Load_impedance*cos(φ)*current^2  # disabled
# The usefull power is
P_usefull := |Z_load|*cos(φ)*V_output_pic^2/(2*|Z_load|^2)  # disabled  # (5)
# The efficiency is
ν := P_usefull/(P_resistive_part + P_rip)  # disabled
ν := |Z_load|*cos(φ)*V_output_pic^2/(2*|Z_load|^2)/((2*R_ds_on + 2*R_inductor + Z_load*cos(φ))*V_output_pic^2/(2*|Z_load|^2) + 2*(R_inductor + R_ds_on)*(PVDD/(sqrt(3)*(8*f_s*inductor)))^2)  # disabled
# We take for example the following values
V_output_pic := 7.81*sqrt(2)*V  # disabled
f_s := 310 kHz
inductor := 47 μH
R_ds_on := 1 Ω
R_inductor := 1 Ω
# we call Zr the following expression:
Zr := 2*(R_inductor + R_ds_on)
ν(φ, Z_load, V_output_pic) := |Z_load|*cos(φ)*V_output_pic^2/(2*|Z_load|^2)/((Zr + Z_load*cos(φ))*V_output_pic^2/(2*|Z_load|^2) + Zr*(PVDD/(sqrt(3)*(8*f_s*inductor)))^2 + P_static_COTS_1DAC)
ν(75.8*π/180, 59.9 Ω, 7.81*sqrt(2)*V)*100 = 52.3867
# This result does not include the current which flows in the damped resistor (output of the filter)
# For remind, we saw that
Z3(s) := 1/(C3*s) + R3
# The power dissipated in a single 'R3' is
P_R3(s) := R3*((0.5*V_output_pic)/sqrt(2)/(1/(C3*s) + R3))^2  # disabled
# For remind, there are two 'R3' in the design so the loss P_R3 counts twice! The new efficiency formula is:
R3*((0.5*22*V)/sqrt(2)/(1/(C3*2*π*1900*Hz) + R3)) = 0.251588 V
ν(φ, Z_load, V_output_pic, freq) := |Z_load|*cos(φ)*V_output_pic^2/(2*|Z_load|^2)/((Zr + Z_load*cos(φ))*V_output_pic^2/(2*|Z_load|^2) + Zr*(PVDD/(sqrt(3)*(8*f_s*inductor)))^2 + P_static_COTS_1DAC + 2*R3*(((0.5*V_output_pic)/sqrt(2))/(1/(C3*2*π*freq) + R3))^2)
Conso(φ, Z_load, V_output_pic, freq) := |Z_load|*cos(φ)*V_output_pic^2/(2*|Z_load|^2)
0.6 V/(40 Ω) = 0.015 A
Puissance_alim(φ, Z_load, V_output_pic, freq) := (Zr + Z_load*cos(φ))*V_output_pic^2/(2*|Z_load|^2) + Zr*(PVDD/(sqrt(3)*(8*f_s*inductor)))^2 + P_static_COTS_1DAC + 2*R3*(((0.5*V_output_pic)/sqrt(2))/(1/(C3*2*π*freq) + R3))^2
(0.6 V)^2/(40 Ω) = 0.009 W
ν(78.75*π/180, 75.59 Ω, 7.75*sqrt(2)*V, 2400 Hz)*100 = 41.4812  # (result1)
ν(75.9*π/180, 59.9 Ω, 7.81*sqrt(2)*V, 1900 Hz)*100 = 50.991  # (result2)
10*Conso(78.217*π/180, 237 Ω, 7.07*sqrt(2)*V, 1900 Hz) = 0.430683 W
ν(78.2*π/180, 237 Ω, 7.07*sqrt(2)*V, 1900 Hz)*100 = 20.0544
# (result3)
10*Puissance_alim(78*π/180, 237 Ω, 7.07*sqrt(2)*V, 1900 Hz) = 2.15783 W
2.15/0.4 = 5.375
0.431/2.15*100 = 20.0465
ν(78*π/180, 95 Ω, 7.07*sqrt(2)*V, 1900 Hz)*100 = 36.4742  # (result4)
# These values have to be compared with pratical values:
4*Conso(78.217*π/180, 95 Ω, 7.07*sqrt(2)*V, 1900 Hz) = 0.429777 W
0.43/1.2*100 = 35.8333
4*Puissance_alim(78*π/180, 95 Ω, 7.07*sqrt(2)*V, 1900 Hz) = 1.19969 W
10*40 + 2*20 = 440  # NFCC : 4ACS capables de fournir 110mA
7 V/(110 mA) = 63.6364 Ω
# The expected therical efficiency is 8 points better than the measure!
# icalc is the current computed according to the L, R and Vout parameters, to be compared with the i(out), measured with the current-meter
4*Conso(70*π/180, 63 Ω, 7.07*sqrt(2)*V, 1900 Hz) = 1.08545 W
4*Puissance_alim(70*π/180, 63 Ω, 7.07*sqrt(2)*V, 1900 Hz) = 1.96045 W
1*20*V*7 V/(15 Ω) = 9.33333 W
# To viualize the efficiency of the Class D design, the 3D graph is drown for f=1900Hz, 7.07V RMS
4*20*V*7 V/(63 Ω) = 8.88889 W
ν_1900Hz(φ, Z_load) := ν(φ, Z_load, 10 V, 1900 Hz)
# [component: inputs ν_1900Hz]
7*V/(440 mA) = 15.9091 Ω
# If we want to compare with the SEC-E solution: we (re)define the efficiency of the SEC-E design
ν_SEC_E(VSIN, freq, phi, Zload) := VSIN*VSIN/(2*Zload)*cos(phi)/(P_Static_nominal_SEC_E + VSIN/(Zload*sqrt(2))*15*V)
# and we make the ratio efficiency-class_D / efficiency-SEC-E Design:
Comp_efficiency(φ, Z_load) := ν_1900Hz(φ, Z_load)/ν_SEC_E(10 V, 1900 Hz, φ, Z_load)
# the following grapg shows the ration efficiency(Class D) / efficiency (SEC-E)
# [component: inputs Comp_efficiency]
10 mA*84*Ω = 0.84 V
7
# [component: inputs Comp_efficiency]
# The class D is really better than the SEC-E solution when the load is between 30 and 70 ohms
Comp_efficiency(1.2, 30 Ω) = 3.76614
Comp_efficiency(1.2, 40 Ω) = 3.83433
Comp_efficiency(1.2, 60 Ω) = 3.76075
Comp_efficiency(1.2, 70 Ω) = 3.68623
# If we want to compare with the ELAC-e solution: we (re)define the efficiency of the SEC-E design
ν_elac_E(VSIN, freq, phi, Zload) := VSIN*VSIN/(2*Zload)*cos(phi)/(P_static_total_nominal_elac_E + VSIN/(Zload*sqrt(2))*20*V)
ν_elac_E(VSIN, freq, phi, Zload)
# and we make the ratio efficiency-class_D / efficiency-SEC-E Design:
7.07*sqrt(2)*V/(sqrt(2)*75*Ω) = 0.0942667 A
Comp_efficiency_elac(φ, Z_load) := ν_1900Hz(φ, Z_load)/ν_elac_E(10 V, 1900 Hz, φ, Z_load)
# the following grapg shows the ration efficiency(Class D) / efficiency (SEC-E)
ν_elac_E(7.07*sqrt(2)*V, 2400 Hz, 78.75*π/180, 75.5 Ω)*100 = 6.09964  # (result1)
# [component: inputs Comp_efficiency_elac]
7.75*sqrt(2)/sqrt(2)*7.75*sqrt(2)*V/(sqrt(2)*75.5*Ω)*cos(78.75*π/180) = 0.1552 A
ν_elac_E(7.81*sqrt(2)*V, 1900 Hz, 75.9*π/180, 59.94 Ω)*100 = 8.6967  # (result2)
ν_elac_E(7.07*sqrt(2)*V, 1900 Hz, 78*π/180, 237 Ω)*100 = 5.21232
ν_elac_E(7.07*sqrt(2)*V, 1900 Hz, 78*π/180, 95 Ω)*100 = 6.31215
cos(78.75*π/180)
# [component: inputs Comp_efficiency_elac]
## Expected ripple / THD
# According to the bode plots in the beginning of the document, the filter is about -30db at 300kHz. As long as the component are not 'perfect' we considere a -25dB in the following computes
# The output signal of the COTS is two a pwm signals, 10V peak-peak. After the filter, the amplitude of the line at 300kHz is:
20*log(Vs/Vin) := -20  # disabled
Vs/Vin := 10^(25/20)  # disabled
Vs := 10 V*10^(-25/20) = 0.562341 V
# The ripple can be up to about 1.1V, at high frequency. | Result to be confirmed with simu
# With a switching frequency = 600kHz (possible with chips like TPA3128, the filter gain is about - 60dB
Vs := 10 V*10^(-60/20) = 0.01 V
## Improvement ways:
# -1- Chance the COTS to improve the primary stage consumption in decreasing the power voltage to decrease the staic consumption
# -2- use a component with a higher switching frequency
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# The component TPA3126D2 respond to these creterias
# (AVCC = 4.5V, switching frerquency configurable...)
num_of_term := 200
k := 1 .. num_of_term
min_exp := -1
max_exp := 1
Exponent(k) := min_exp + k/num_of_term*(max_exp - min_exp)
ω[k] := 10^Exponent(k)
