L := 40*10^-3
C := 1*10^-6
R := 100
L1 := 47*10^-6
C5 := 1*10^-6
C2 := 1*10^-6
C3 := 1*10^-6
R4 := 10
C4 := 3.9*10^-6
Z1(x) := L1*x
Zl(x) := R + L*x
Z5(x) := 1/(C5*x)
Z2(x) := 1/(C2*x)
Zeq(x) := (1 + R4*C4*x)/(C3*x + R4*C4*C3*x^2 + C4*x)
G1(x) := 1/(2*Z1(x)*((Zl(x) + Z5(x))/Zl(x)*(1/Zeq(x) + 1/(2*Z2(x))) + 1/Zl(x)) + 2*Z5(x)/Zl(x) + 1) simplify → (0*x^4 + 7.092*10^9*x^3 + 199.582*10^12*x^2 + 454.628*10^15*x + 476.837*10^-9)/((x + 35.508*10^3)*(x^2 + 2.508*10^3*x + 50.547*10^6)*(x^2 + 56.791*10^3*x + 5.066*10^9)) factor → 25*(646.235*10^15*x^4 + 22.163*10^51*x^3 + 623.693*10^54*x^2 + 1.421*10^60*x + 1.49*10^36)/((125*10^12*x + 4.439*10^18)*(10*10^15*x^2 + 25.085*10^18*x + 505.466*10^21)*(62.5*10^12*x^2 + 3.549*10^18*x + 316.626*10^21)) expand → (35.518*10^60*x + 15.592*10^57*x^2 + 554.078*10^51*x^3 + 16.156*10^18*x^4 + 37.253*10^36)/(63.222*10^60*x + 15.806*10^57*x^2 + 575.362*10^51*x^3 + 7.407*10^48*x^4 + 78.125*10^42*x^5 + 710.356*10^63) → (35.518*10^60*x + 15.592*10^57*x^2 + 554.078*10^51*x^3 + 16.156*10^18*x^4 + 37.253*10^36)/(63.222*10^60*x + 15.806*10^57*x^2 + 575.362*10^51*x^3 + 7.407*10^48*x^4 + 78.125*10^42*x^5 + 710.356*10^63) simplify → (0*x^4 + 7.092*10^9*x^3 + 199.582*10^12*x^2 + 454.628*10^15*x + 476.837*10^-9)/((x + 35.508*10^3)*(x^2 + 2.508*10^3*x + 50.547*10^6)*(x^2 + 56.791*10^3*x + 5.066*10^9)) expand → (454.628*10^15*x + 199.582*10^12*x^2 + 7.092*10^9*x^3 + 0*x^4 + 476.837*10^-9)/(809.238*10^15*x + 202.317*10^12*x^2 + 7.365*10^9*x^3 + 94.808*10^3*x^4 + x^5 + 9.093*10^21)
